*Heading
** Job name: HD6 Model name: HD6
** Generated by: Abaqus/CAE 2018
*Preprint, echo=NO, model=NO, history=NO, contact=NO
**
** PARTS
**
*Part, name=Part-1
*Node
      1,          75.,   11.7988224,          0.5
      2,         73.5,   11.7988224,          0.5
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*Element, type=C3D8R
 1,    8,   82, 1061,  109,    1,   29, 1013,   80
 2,   82,   81, 1062, 1061,   29,   30, 1014, 1013
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*Nset, nset=Set-1, generate
     1,  10474,      1
*Elset, elset=Set-1
1, 2, 3, 4, 5, 6
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*Nset, nset=continuity_path
   2,   3,   5,   6, 157, 158
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*Elset, elset=continuity_path
76, 79, 82, 85, 88, 91
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*Nset, nset=continuity_set, generate
     1,  10474,      1
*Elset, elset=continuity_set
1, 2, 3, 4, 5, 6
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*Nset, nset=cross_section, generate
     1,  10474,      1
*Elset, elset=cross_section
1, 2, 3, 4, 5, 6
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*Nset, nset=keep_set
    1,    2,    3,    4,    5,    6
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*Elset, elset=keep_set
1, 2, 3, 4, 5, 6
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*Elset, elset=_free_surface_S2, internal
1, 2, 3, 4, 5, 6
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*Elset, elset=_free_surface_S1, internal
151, 152, 153, 154, 155, 156
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*Surface, type=ELEMENT, name=free_surface
_free_surface_S2, S2
_free_surface_S1, S1
** Section: Section-1
*Solid Section, elset=Set-1, material=Material-1
,
*End Part
**
**
** ASSEMBLY
**
*Assembly, name=Assembly
**
*Instance, name=Part-1-1, part=Part-1
*End Instance
**
*Nset, nset=Set-1, instance=Part-1-1
  19,  20,  25,  26, 521, 522
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*Elset, elset=Set-1, instance=Part-1-1
1040, 1042, 1044, 1156, 1157, 1229
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*Elset, elset=_Surf-1_S6, internal, instance=Part-1-1
76, 79, 82, 85, 88, 91
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*Surface, type=ELEMENT, name=Surf-1
_Surf-1_S6, S6
*End Assembly
**
** MATERIALS
**
*Material, name=Material-1
*Elastic
69000., 0.3
** ----------------------------------------------------------------
**
** STEP: Step-1
**
*Step, name=Step-1, nlgeom=NO
*Static
1., 1., 1e-05, 1.
**
** BOUNDARY CONDITIONS
**
** Name: BC-1 Type: Symmetry/Antisymmetry/Encastre
*Boundary
Set-1, PINNED
**
** LOADS
**
** Name: Load-1   Type: Pressure
*Dsload
Surf-1, P, 10.
**
** OUTPUT REQUESTS
**
*Restart, write, frequency=0
**
** FIELD OUTPUT: F-Output-1
**
*Output, field
*Node Output
CF, RF, U
*Element Output, directions=YES
ELSE, LE, PE, PEEQ, PEMAG, S
*Contact Output
CDISP, CSTRESS
**
** HISTORY OUTPUT: H-Output-1
**
*Output, history, variable=PRESELECT
*End Step
